Z_O := 3.3*10^6 + 1/(1i*2*π*976.5625*35*10^-12) = 3300000 - 4656419i
Z_S := 0.043 + 1i*2*π*976.5625*151*10^-6 = 0.043 + 0.926524i
Z_X := 6.18 + 1/(1i*2*π*976.5625*107.1*10^-9) = 6.18 - 1521.71i
Z := Z_O*(Z_S - Z_X)/(Z_X - Z_O) = 5.90484 - 1522.97i
